### Eric Frizzell December, 2023 - efrizz@umd.edu
### bed filling script
###

### Initialization

## Preliminaries

units 	si
atom_style 	granular

# the product of the processors must equal P, the number of processors used when running the file: mpirun -np 4 ...
processors 	1 30 1

# periodic x boundaries, fixed y boundaries, fixed -z for floor and fixed shrink wrap for ceiling
boundary 	p f fm

#LIGGGHTS-Public shouuld produce the same answers for any newton flag setting, besides round off
newton 	off

soft_particles yes
# communicate single - each processor acquires informaton for ghost atoms within a single distance of its sub domain - the default
# vel yes - communicate velocity info with ghost atoms
communicate 	single vel yes

#hard_particles no
variable SF equal 0.4 # scaling factor

variable r_p equal ${SF}*1.25e-3 #1
variable d_p equal 2*${r_p}

## Declare domain
# these are being scaled from the paper 1 base case of 2m, 20cm, 2cm
variable x_lo equal -.01*${SF}
variable x_hi equal 0.01*${SF}
variable y_lo equal 0
variable y_hi equal 2*${SF}
variable z_lo equal 0
variable z_hi equal 0.2*${SF}
variable z_highest equal ${z_hi}+0.35*${SF}
# -x +x -y +y -z +z
# reg is the name of the region, block is the region type, unitx box means define in box units instead of lattice
# the slight negative in the z lower bound is to give room for the shake plate
region  reg block ${x_lo} ${x_hi} ${y_lo} ${y_hi} ${z_lo} ${z_highest} units box

# create_box creates a simulation box based on the specified region
# N = 3, number of atom types used in the simulation
create_box	 1 reg

# neighbor skin style - atom pairs within a neighbor cutoff distance = force cutoff + skin distance, style = bin
variable n_r equal 0.5*${r_p}
neighbor	 ${n_r} bin	 # half the radius of the smallest particles

# neigh_modify delay 0, this is the default, rebuild neighbor list every timestep
neigh_modify delay 0

## Material properties
fix            m1 all property/global youngsModulus peratomtype 5E6
fix            m2 all property/global poissonsRatio peratomtype 0.2
fix            m3 all property/global coefficientRestitution peratomtypepair 1 0.06
fix            m4 all property/global coefficientFriction peratomtypepair 1 1.0
fix            m5 all property/global characteristicVelocity scalar .01
fix            m6 all property/global cohesionEnergyDensity peratomtypepair 1 1000.0
fix             m7 all property/global coefficientRollingFriction peratomtypepair 1 0.8
fix             m8 all property/global coefficientRollingViscousDamping peratomtypepair 1 0.0

## Pair style
pair_style     gran model hertz tangential history cohesion sjkr rolling_friction epsd torsionTorque on
pair_coeff	* *  # the asterisks set force field coefficients for all atom types

# timestep
timestep	0.000001

## Thermo settings
# thermo style custom says what thermo data we want printed at each thermo timestep - timestep, num atoms, kinetic energy, volume
thermo_style 	custom step atoms ke vol
# thermo output every 1000 timesteps
thermo		1000
# LIGGGHTS will ignore last particles and will not normalize against num atoms
thermo_modify	lost ignore norm no

## walls
fix		wall_y1 all wall/gran model hertz tangential history cohesion sjkr rolling_friction epsd primitive type 1 yplane 0.0 	# wall moves later
fix		wall_y2 all wall/gran model hertz tangential history cohesion sjkr rolling_friction epsd primitive type 1 yplane ${y_hi}  	# "endcap"
fix		wall_z1 all wall/gran model hertz tangential history cohesion sjkr rolling_friction epsd primitive type 1 zplane 0.0  		# floor


# particles and their distribution
fix		pts1 all particletemplate/sphere 15485863 atom_type 1 density constant 2500 radius constant ${r_p}
fix            pdd1 all particledistribution/discrete 15487517 1 pts1 1.0

variable scaleSTL equal 0.000999*${SF}
variable moveSTL equal ${SF}*0.001
variable raiseSTL equal ${SF}*0.25

fix             ins_mesh all mesh/surface file meshes/ins_surface_2m.stl type 1 scale ${scaleSTL} move 0.00 ${moveSTL} ${raiseSTL}

variable v_ins_y equal ${SF}*-0.01
variable v_ins_z equal ${SF}*-2

fix             ins nve_group insert/stream seed 30000001 distributiontemplate pdd1 nparticles 600000 &
                 vel constant 0. ${v_ins_y} ${v_ins_z} particlerate 200000 &
                 overlapcheck yes insertion_face ins_mesh extrude_length ${z_hi}

fix             2 all gravity 1.625 vector 0.0 0.0 -1.0

# appply nve integration to all particles that are inserted as single particles
fix		integr nve_group nve/sphere

fix ts_check all check/timestep/gran 1000 0.1 0.1

compute stressed all stress/atom
compute deltas all pair/gran/local id delta

dump            dmp all custom 100000 post/dump*.post id type x y z vx vy vz radius fx fy fz mass
dump dmp_local all local 100000 post_computes/dump_computes*.post c_deltas[1] c_deltas[2] c_deltas[4]


# shave off top particles
#region outisde block -.01 .01 0.0 2.00 0.201 EDGE units box
#group tobedeleted region outisde


run 3500000 every 1000000 "write_restart restart_ins_c.static"


unfix ins

# reset properties
unfix m3
unfix m8
fix            m3a all property/global coefficientRestitution peratomtypepair 1 0.55
fix 		m8a all property/global coefficientRollingViscousDamping peratomtypepair 1 2.0


# shave off top particles
variable z_cut equal 0.201*${SF}
region outside block ${x_lo} ${x_hi} ${y_lo} ${y_hi} ${z_cut} EDGE units box
#region outisde block -.01 .01 0.0 2.00 0.201 EDGE units box
group tobedeleted region outside
delete_atoms group tobedeleted

# relax
run	1500000 every 25000 &
         "velocity all set 0. 0. 0." &
         "write_restart restart_settling_c.static"

#write_restart post_tap.static

write_restart restart_2m_medium_1mmDiam.static


undump		dmp
undump		dmp_local
